# OpenSim document version 30000
# No muscle. Modified by Guoping Zhao, Lauflabor, TU Darmstadt.
Model DRL_sub01:
  length_units: meters
  force_units: N
  gravity: 0 -9.80665 0
  credits:
    Delp S.L., Loan J.P., Hoy M.G., Zajac F.E., Topp E.L., Rosen J.M., Thelen D.G., Anderson F.C., Seth A., Hamner S.R.
  publications:
    Notes: 3D, 23 DOF gait model created by D.G. Thelen, Univ. of Wisconsin-Madison, and Samuel Hamner, Ajay Seth, Frank C. Anderson, and Scott L. Delp, Stanford University. Lower extremity joint defintions based on Delp et al. (1990). Low back joint and anthropometry based on Anderson and Pandy (1999, 2001). Planar knee model of Yamaguchi and Zajac (1989). Seth removed the patella to avoid kinematic constraints; insertions of the quadrucepts are handled with moving points in the tibia frame. Hamner added arms adapted from Holzbaur et al., 2005. Hamner, S.R., Seth, A, Delp, S.L.: Muscle contributions to propulsion and support during running. Journal of Biomechanics, 2010. Delp, S.L., Loan, J.P., Hoy, M.G., Zajac, F.E., Topp E.L., Rosen, J.M.: An interactive graphics-based model of the lower extremity to study orthopaedic surgical procedures, IEEE Transactions on Biomedical Engineering, vol. 37, pp. 757-767, 1990. Yamaguchi G.T., Zajac F.E.: A planar model of the knee joint to characterize the knee extensor mechanism." J . Biomech. vol. 21. pp. 1-10. 1989. Anderson F.C., Pandy M.G.: A dynamic optimization solution for vertical jumping in three dimensions. Computer Methods in Biomechanics and Biomedical Engineering 2:201-231, 1999. Anderson F.C., Pandy M.G.: Dynamic optimization of human walking. Journal of Biomechanical Engineering 123:381-390, 2001. Holzbaur, KR, WM Murray and SL Delp, 2005. A model of the upper extremity for simulating musculoskeletal surgery and analyzing neuromuscular control. Ann Biomed Eng 33(6): 829-840.
  BodySet:
    Body ground: mass=0 mass_center=(0 0 0) inertia_xx=0 inertia_yy=0 inertia_zz=0
    Body pelvis: mass=13.57299 mass_center=(-0.0721882 0 0) inertia_xx=0.1235173 inertia_yy=0.1046533
        inertia_zz=0.06956859 meshes=(sacrum.vtp pelvis.vtp l_pelvis.vtp)
      CustomJoint ground_pelvis: parent_body=ground location_in_parent=(0 0 0) location=(0 0 0)
        Coordinate pelvis_tilt: motion_type=rotational default_value=0 range=(-1.570796 1.570796) clamped=true
        Coordinate pelvis_list: motion_type=rotational default_value=0 range=(-1.570796 1.570796) clamped=true
        Coordinate pelvis_rotation: motion_type=rotational default_value=0 range=(-1.570796 1.570796) clamped=true
        Coordinate pelvis_tx: motion_type=translational default_value=0 range=(-5 5) clamped=true
        Coordinate pelvis_ty: motion_type=translational default_value=0 range=(-1 2) clamped=true
        Coordinate pelvis_tz: motion_type=translational default_value=0 range=(-3 3) clamped=true
        SpatialTransform:
          TransformAxis rotation1: coordinates=pelvis_tilt axis=(0 0 1) LinearFunction(coefficients=1 0)
          TransformAxis rotation2: coordinates=pelvis_list axis=(1 0 0) LinearFunction(coefficients=1 0)
          TransformAxis rotation3: coordinates=pelvis_rotation axis=(0 1 0) LinearFunction(coefficients=1 0)
          TransformAxis translation1: coordinates=pelvis_tx axis=(1 0 0) LinearFunction(coefficients=1 0)
          TransformAxis translation2: coordinates=pelvis_ty axis=(0 1 0) LinearFunction(coefficients=1 0)
          TransformAxis translation3: coordinates=pelvis_tz axis=(0 0 1) LinearFunction(coefficients=1 0)
    Body femur_r: mass=10.71986 mass_center=(0 -0.154514 0) inertia_xx=0.1274855 inertia_yy=0.03341854
        inertia_zz=0.1344358 meshes=femur_r.vtp
      CustomJoint hip_r: parent_body=pelvis location_in_parent=(-0.07218821 -0.06749138 0.08525764) location=(0 0 0)
        Coordinate hip_flexion_r: motion_type=rotational default_value=0 range=(-2.094395 2.094395) clamped=true
        Coordinate hip_adduction_r: motion_type=rotational default_value=0 range=(-2.094395 2.094395) clamped=true
        Coordinate hip_rotation_r: motion_type=rotational default_value=0 range=(-2.094395 2.094395) clamped=true
        SpatialTransform: axes_held_at_zero=(translation1 translation2 translation3)
          TransformAxis rotation1: coordinates=hip_flexion_r axis=(0 0 1) LinearFunction(coefficients=1 0)
          TransformAxis rotation2: coordinates=hip_adduction_r axis=(1 0 0) LinearFunction(coefficients=1 0)
          TransformAxis rotation3: coordinates=hip_rotation_r axis=(0 1 0) LinearFunction(coefficients=1 0)
    Body tibia_r: mass=4.272894 mass_center=(0 -0.208485 0) inertia_xx=0.07243203 inertia_yy=0.007329432
        inertia_zz=0.07343803 meshes=(tibia_r.vtp fibula_r.vtp)
      CustomJoint knee_r: parent_body=femur_r location_in_parent=(0 0 0) location=(0 0 0)
        Coordinate knee_angle_r: motion_type=rotational default_value=0 range=(-2.094395 0.1745329) clamped=true
        SpatialTransform: axes_held_at_zero=(rotation2 rotation3 translation3)
          TransformAxis rotation1: coordinates=knee_angle_r axis=(0 0 1) LinearFunction(coefficients=1 0)
          TransformAxis translation1: coordinates=knee_angle_r axis=(1 0 0)
            MultiplierFunction: scale=0.9089075
              SimmSpline: x=(-2.0944 -1.74533 -1.39626 -1.0472 -0.698132 -0.349066 -0.174533 0.197344 0.337395 0.490178 1.52146 2.0944)
                  y=(-0.0032 0.00179 0.00411 0.0041 0.00212 -0.001 -0.0031 -0.005227 -0.005435 -0.005574 -0.005435 -0.00525)
          TransformAxis translation2: coordinates=knee_angle_r axis=(0 1 0)
            MultiplierFunction: scale=0.9089075
              SimmSpline: x=(-2.0944 -1.22173 -0.523599 -0.349066 -0.174533 0.159149 2.0944)
                  y=(-0.4226 -0.4082 -0.399 -0.3976 -0.3966 -0.395264 -0.396)
    Body talus_r: mass=0.11525 mass_center=(0 0 0) inertia_xx=0.001437143 inertia_yy=0.001437143 inertia_zz=0.001437143
        meshes=talus_rv.vtp
      CustomJoint ankle_r: parent_body=tibia_r location_in_parent=(0 -0.4801734 0) location=(0 0 0)
        Coordinate ankle_angle_r: motion_type=rotational default_value=0 range=(-1.570796 1.570796) clamped=true
        SpatialTransform: axes_held_at_zero=(rotation2 rotation3 translation1 translation2 translation3)
          TransformAxis rotation1: coordinates=ankle_angle_r axis=(-0.1050135 -0.1740224 0.9791263)
              LinearFunction(coefficients=1 0)
    Body calcn_r: mass=1.440625 mass_center=(0.106552 0.0319656 0) inertia_xx=0.001831856 inertia_yy=0.005103027
        inertia_zz=0.00536472 meshes=foot.vtp
      CustomJoint subtalar_r: parent_body=talus_r location_in_parent=(-0.05446059 -0.04684482 0.008844123)
          location=(0 0 0)
        Coordinate subtalar_angle_r: motion_type=rotational default_value=0 range=(-1.570796 1.570796) clamped=true
            locked=true
        SpatialTransform: axes_held_at_zero=(rotation2 rotation3 translation1 translation2 translation3)
          TransformAxis rotation1: coordinates=subtalar_angle_r axis=(0.7871796 0.6047475 -0.1209495)
              LinearFunction(coefficients=1 0)
    Body toes_r: mass=0.2496315 mass_center=(0.036867 0.00639311 -0.0186466) inertia_xx=0.0001308468
        inertia_yy=0.0002616937 inertia_zz=0.001308468 meshes=bofoot.vtp
      CustomJoint mtp_r: parent_body=calcn_r location_in_parent=(0.1905148 -0.002131038 0.00115076) location=(0 0 0)
        Coordinate mtp_angle_r: motion_type=rotational default_value=0 range=(-1.570796 1.570796) clamped=true
            locked=true
        SpatialTransform: axes_held_at_zero=(rotation2 rotation3 translation1 translation2 translation3)
          TransformAxis rotation1: coordinates=mtp_angle_r axis=(-0.5809544 0 0.8139361)
              LinearFunction(coefficients=1 0)
    Body femur_l: mass=10.71986 mass_center=(0 -0.154514 0) inertia_xx=0.1274855 inertia_yy=0.03341854
        inertia_zz=0.1344358 meshes=femur_l.vtp
      CustomJoint hip_l: parent_body=pelvis location_in_parent=(-0.07218821 -0.06749138 -0.08525764) location=(0 0 0)
        Coordinate hip_flexion_l: motion_type=rotational default_value=0 range=(-2.094395 2.094395) clamped=true
        Coordinate hip_adduction_l: motion_type=rotational default_value=0 range=(-2.094395 2.094395) clamped=true
        Coordinate hip_rotation_l: motion_type=rotational default_value=0 range=(-2.094395 2.094395) clamped=true
        SpatialTransform: axes_held_at_zero=(translation1 translation2 translation3)
          TransformAxis rotation1: coordinates=hip_flexion_l axis=(0 0 1) LinearFunction(coefficients=1 0)
          TransformAxis rotation2: coordinates=hip_adduction_l axis=(-1 0 0) LinearFunction(coefficients=1 0)
          TransformAxis rotation3: coordinates=hip_rotation_l axis=(0 -1 0) LinearFunction(coefficients=1 0)
    Body tibia_l: mass=4.272894 mass_center=(0 -0.208485 0) inertia_xx=0.07243203 inertia_yy=0.007329432
        inertia_zz=0.07343803 meshes=(tibia_l.vtp fibula_l.vtp)
      CustomJoint knee_l: parent_body=femur_l location_in_parent=(0 0 0) location=(0 0 0)
        Coordinate knee_angle_l: motion_type=rotational default_value=0 range=(-2.094395 0.1745329) clamped=true
        SpatialTransform: axes_held_at_zero=(rotation2 rotation3 translation3)
          TransformAxis rotation1: coordinates=knee_angle_l axis=(0 0 1) LinearFunction(coefficients=1 0)
          TransformAxis translation1: coordinates=knee_angle_l axis=(1 0 0)
            MultiplierFunction: scale=0.9089075
              SimmSpline: x=(-2.0944 -1.74533 -1.39626 -1.0472 -0.698132 -0.349066 -0.174533 0.197344 0.337395 0.490178 1.52146 2.0944)
                  y=(-0.0032 0.00179 0.00411 0.0041 0.00212 -0.001 -0.0031 -0.005227 -0.005435 -0.005574 -0.005435 -0.00525)
          TransformAxis translation2: coordinates=knee_angle_l axis=(0 1 0)
            MultiplierFunction: scale=0.9089075
              SimmSpline: x=(-2.0944 -1.22173 -0.523599 -0.349066 -0.174533 0.159149 2.0944)
                  y=(-0.4226 -0.4082 -0.399 -0.3976 -0.3966 -0.395264 -0.396)
    Body talus_l: mass=0.11525 mass_center=(0 0 0) inertia_xx=0.001437143 inertia_yy=0.001437143 inertia_zz=0.001437143
        meshes=talus_lv.vtp
      CustomJoint ankle_l: parent_body=tibia_l location_in_parent=(0 -0.4801734 0) location=(0 0 0)
        Coordinate ankle_angle_l: motion_type=rotational default_value=0 range=(-1.047198 1.047198) clamped=true
        SpatialTransform: axes_held_at_zero=(rotation2 rotation3 translation1 translation2 translation3)
          TransformAxis rotation1: coordinates=ankle_angle_l axis=(0.1050135 0.1740224 0.9791263)
              LinearFunction(coefficients=1 0)
    Body calcn_l: mass=1.440625 mass_center=(0.106552 0.0319656 0) inertia_xx=0.001831856 inertia_yy=0.005103027
        inertia_zz=0.00536472 meshes=l_foot.vtp
      CustomJoint subtalar_l: parent_body=talus_l location_in_parent=(-0.05446059 -0.04684482 -0.008844123)
          location=(0 0 0)
        Coordinate subtalar_angle_l: motion_type=rotational default_value=0 range=(-1.570796 1.570796) clamped=true
            locked=true
        SpatialTransform: axes_held_at_zero=(rotation2 rotation3 translation1 translation2 translation3)
          TransformAxis rotation1: coordinates=subtalar_angle_l axis=(-0.7871796 -0.6047475 -0.1209495)
              LinearFunction(coefficients=1 0)
    Body toes_l: mass=0.2496315 mass_center=(0.036867 0.00639311 0.0186466) inertia_xx=0.0001308468
        inertia_yy=0.0002616937 inertia_zz=0.001308468 meshes=l_bofoot.vtp
      CustomJoint mtp_l: parent_body=calcn_l location_in_parent=(0.1905148 -0.002131038 -0.00115076) location=(0 0 0)
        Coordinate mtp_angle_l: motion_type=rotational default_value=0 range=(-1.047198 1.047198) clamped=true
            locked=true
        SpatialTransform: axes_held_at_zero=(rotation2 rotation3 translation1 translation2 translation3)
          TransformAxis rotation1: coordinates=mtp_angle_l axis=(0.5809544 0 0.8139361)
              LinearFunction(coefficients=1 0)
    Body torso: mass=30.91766 mass_center=(-0.0323208 0.344755 0) inertia_xx=1.972456 inertia_yy=1.010641
        inertia_zz=1.914801 meshes=(hat_spine.vtp hat_jaw.vtp hat_skull.vtp hat_ribs_scap.vtp)
      CustomJoint back: parent_body=pelvis location_in_parent=(-0.1028197 0.08321554 0) location=(0 0 0)
        Coordinate lumbar_extension: motion_type=rotational default_value=0 range=(-1.570796 1.570796) clamped=true
        Coordinate lumbar_bending: motion_type=rotational default_value=0 range=(-1.570796 1.570796) clamped=true
        Coordinate lumbar_rotation: motion_type=rotational default_value=0 range=(-1.570796 1.570796) clamped=true
        SpatialTransform: axes_held_at_zero=(translation1 translation2 translation3)
          TransformAxis rotation1: coordinates=lumbar_extension axis=(0 0 1) LinearFunction(coefficients=1 0)
          TransformAxis rotation2: coordinates=lumbar_bending axis=(1 0 0) LinearFunction(coefficients=1 0)
          TransformAxis rotation3: coordinates=lumbar_rotation axis=(0 1 0) LinearFunction(coefficients=1 0)
    Body humerus_r: mass=2.342456 mass_center=(0 -0.193252 0) inertia_xx=0.01900066 inertia_yy=0.00655464
        inertia_zz=0.02132763 meshes=humerus_rv.vtp
      CustomJoint acromial_r: parent_body=torso location_in_parent=(0.003399071 0.4002392 0.1831512) location=(0 0 0)
        Coordinate arm_flex_r: motion_type=rotational default_value=0 range=(-1.570796 1.570796) clamped=true
        Coordinate arm_add_r: motion_type=rotational default_value=0 range=(-2.094395 1.570796) clamped=true
        Coordinate arm_rot_r: motion_type=rotational default_value=0 range=(-1.570796 1.570796) clamped=true
        SpatialTransform: axes_held_at_zero=(translation1 translation2 translation3)
          TransformAxis rotation1: coordinates=arm_flex_r axis=(0 0 1) LinearFunction(coefficients=1 0)
          TransformAxis rotation2: coordinates=arm_add_r axis=(1 0 0) LinearFunction(coefficients=1 0)
          TransformAxis rotation3: coordinates=arm_rot_r axis=(0 1 0) LinearFunction(coefficients=1 0)
    Body ulna_r: mass=0.7001437 mass_center=(0 -0.133575 0) inertia_xx=0.004192949 inertia_yy=0.0008748287
        inertia_zz=0.00454826 meshes=ulna_rv.vtp
      CustomJoint elbow_r: parent_body=humerus_r location_in_parent=(0.01544117 -0.3363048 -0.01127191)
          location=(0 0 0)
        Coordinate elbow_flex_r: motion_type=rotational default_value=0 range=(0 2.618) clamped=true
        SpatialTransform: axes_held_at_zero=(rotation2 rotation3 translation1 translation2 translation3)
          TransformAxis rotation1: coordinates=elbow_flex_r axis=(0.226047 0.022269 0.9738618)
              LinearFunction(coefficients=1 0)
    Body radius_r: mass=0.7001437 mass_center=(0 -0.133575 0) inertia_xx=0.004192949 inertia_yy=0.0008748287
        inertia_zz=0.00454826 meshes=radius_rv.vtp
      CustomJoint radioulnar_r: parent_body=ulna_r location_in_parent=(-0.007455353 -0.01441531 0.02890709)
          location=(0 0 0)
        Coordinate pro_sup_r: motion_type=rotational default_value=0 range=(0 1.570796) clamped=true
        SpatialTransform: axes_held_at_zero=(rotation2 rotation3 translation1 translation2 translation3)
          TransformAxis rotation1: coordinates=pro_sup_r axis=(0.05639803 0.9984065 0.001952)
              LinearFunction(coefficients=1 0)
    Body hand_r: mass=0.5272687 mass_center=(0 -0.0725565 0) inertia_xx=0.001167154 inertia_yy=0.0007157322
        inertia_zz=0.001753348
        meshes=(pisiform_rvs.vtp lunate_rvs.vtp scaphoid_rvs.vtp triquetrum_rvs.vtp hamate_rvs.vtp capitate_rvs.vtp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)
      CustomJoint radius_hand_r: parent_body=radius_r location_in_parent=(-0.009749479 -0.2613762 0.0150836)
          location=(0 0 0)
        Coordinate wrist_flex_r: motion_type=rotational default_value=0 range=(-1.22173 1.22173) clamped=true
            locked=true
        Coordinate wrist_dev_r: motion_type=rotational default_value=0 range=(-0.4363323 0.6108652) clamped=true
            locked=true
        SpatialTransform: axes_held_at_zero=(rotation3 translation1 translation2 translation3)
          TransformAxis rotation1: coordinates=wrist_flex_r axis=(0 0 1) LinearFunction(coefficients=1 0)
          TransformAxis rotation2: coordinates=wrist_dev_r axis=(1 0 0) LinearFunction(coefficients=1 0)
    Body humerus_l: mass=2.342456 mass_center=(0 -0.193252 0) inertia_xx=0.01900066 inertia_yy=0.00655464
        inertia_zz=0.02132763 meshes=humerus_lv.vtp
      CustomJoint acromial_l: parent_body=torso location_in_parent=(0.003399071 0.4002392 -0.1831512) location=(0 0 0)
        Coordinate arm_flex_l: motion_type=rotational default_value=0 range=(-1.570796 1.570796) clamped=true
        Coordinate arm_add_l: motion_type=rotational default_value=0 range=(-2.094395 1.570796) clamped=true
        Coordinate arm_rot_l: motion_type=rotational default_value=0 range=(-1.570796 1.570796) clamped=true
        SpatialTransform: axes_held_at_zero=(translation1 translation2 translation3)
          TransformAxis rotation1: coordinates=arm_flex_l axis=(0 0 1) LinearFunction(coefficients=1 0)
          TransformAxis rotation2: coordinates=arm_add_l axis=(-1 0 0) LinearFunction(coefficients=1 0)
          TransformAxis rotation3: coordinates=arm_rot_l axis=(0 -1 0) LinearFunction(coefficients=1 0)
    Body ulna_l: mass=0.7001437 mass_center=(0 -0.133575 0) inertia_xx=0.004192949 inertia_yy=0.0008748287
        inertia_zz=0.00454826 meshes=ulna_lv.vtp
      CustomJoint elbow_l: parent_body=humerus_l location_in_parent=(0.01544117 -0.3363048 0.01127191) location=(0 0 0)
        Coordinate elbow_flex_l: motion_type=rotational default_value=0 range=(0 2.618) clamped=true
        SpatialTransform: axes_held_at_zero=(rotation2 rotation3 translation1 translation2 translation3)
          TransformAxis rotation1: coordinates=elbow_flex_l axis=(-0.226047 -0.022269 0.9738618)
              LinearFunction(coefficients=1 0)
    Body radius_l: mass=0.7001437 mass_center=(0 -0.133575 0) inertia_xx=0.004192949 inertia_yy=0.0008748287
        inertia_zz=0.00454826 meshes=radius_lv.vtp
      CustomJoint radioulnar_l: parent_body=ulna_l location_in_parent=(-0.007455353 -0.01441531 -0.02890709)
          location=(0 0 0)
        Coordinate pro_sup_l: motion_type=rotational default_value=0 range=(0 1.570796) clamped=true
        SpatialTransform: axes_held_at_zero=(rotation2 rotation3 translation1 translation2 translation3)
          TransformAxis rotation1: coordinates=pro_sup_l axis=(-0.05639803 -0.9984065 0.001952)
              LinearFunction(coefficients=1 0)
    Body hand_l: mass=0.5272687 mass_center=(0 -0.0725565 0) inertia_xx=0.001167154 inertia_yy=0.0007157322
        inertia_zz=0.001753348
        meshes=(pisiform_lvs.vtp lunate_lvs.vtp scaphoid_lvs.vtp triquetrum_lvs.vtp hamate_lvs.vtp capitate_lvs.vtp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)
      CustomJoint radius_hand_l: parent_body=radius_l location_in_parent=(-0.009749479 -0.2613762 -0.0150836)
          location=(0 0 0)
        Coordinate wrist_flex_l: motion_type=rotational default_value=0 range=(-1.22173 1.22173) clamped=true
            locked=true
        Coordinate wrist_dev_l: motion_type=rotational default_value=0 range=(-0.4363323 0.6108652) clamped=true
            locked=true
        SpatialTransform: axes_held_at_zero=(rotation3 translation1 translation2 translation3)
          TransformAxis rotation1: coordinates=wrist_flex_l axis=(0 0 1) LinearFunction(coefficients=1 0)
          TransformAxis rotation2: coordinates=wrist_dev_l axis=(-1 0 0) LinearFunction(coefficients=1 0)
  MarkerSet:
    Marker Stem: torso (0.175542 0.23866 -0.00547572)
    Marker Throat: torso (0.037102 0.423288 0) fixed=true
    Marker R.Acromium: torso (0.0346452 0.454129 0.160947)
    Marker L.Acromium: torso (0.0362626 0.455322 -0.179773)
    Marker C7: torso (-0.0754152 0.474038 0) fixed=true
    Marker R.Elbow.Lat: humerus_r (0.0201291 -0.329381 0.0270621)
    Marker R.Elbow.Med: humerus_r (0.00425672 -0.328468 -0.0649866)
    Marker R.Wrist.Med: radius_r (-0.0169677 -0.257917 -0.0203811) fixed=true
    Marker R.Wrist.Lat: radius_r (0 -0.257917 0.0498723) fixed=true
    Marker L.Elbow.Lat: humerus_l (0.0275165 -0.316551 -0.0326585)
    Marker L.Elbow.Med: humerus_l (0.0117684 -0.326346 0.065362)
    Marker L.Wrist.Med: radius_l (-0.0438114 -0.241223 0.00281616)
    Marker L.Wrist.Lat: radius_l (0.0253089 -0.252673 -0.0330734)
    Marker R.ASIS: pelvis (0.020421 0.040842 0.137842) fixed=true
    Marker L.ASIS: pelvis (0.020421 0.040842 -0.137842) fixed=true
    Marker V.Sacral: pelvis (-0.20815 0.0884051 0.019802)
    Marker R.Thigh.Upper: femur_r (0.020619 -0.00775448 0.114956)
    Marker R.Knee.Lat: femur_r (0.00472785 -0.38899 0.0881481)
    Marker R.Ankle.Lat: tibia_r (-0.00558341 -0.45784 0.0670009) fixed=true
    Marker R.Ankle.Med: tibia_r (-0.00984747 -0.459338 -0.0191836)
    Marker R.Heel: calcn_r (-0.0591532 0.0158524 0.0238334)
    Marker R.Toe.Tip: calcn_r (0.180468 0.026095 -0.0043575)
    Marker L.Thigh.Upper: femur_l (0.0319742 -0.00624125 -0.110127)
    Marker L.Knee.Lat: femur_l (0.027852 -0.398589 -0.0946664)
    Marker L.Ankle.Lat: tibia_l (-0.0254087 -0.466613 -0.0749052)
    Marker L.Ankle.Med: tibia_l (-0.0106712 -0.456767 0.0215726)
    Marker L.Heel: calcn_l (-0.0484278 0.0123464 -0.0331238)
    Marker L.Toe.Tip: calcn_l (0.188843 0.0311685 0.0198127)
